<Lems>

    <!--

        This LEMS file has been automatically generated using PyNeuroML v0.0.2

     -->

    <!-- Specify which component to run -->
    <Target component="sim"/>

    <!-- Include core NeuroML2 ComponentType definitions -->
    <Include file="Cells.xml"/>
    <Include file="Networks.xml"/>
    <Include file="Simulation.xml"/>

    <Include file="lemsDefinitions/IaF_GrC.nml"/>
    <Include file="lemsDefinitions/spikeGenerators.xml"/>
    <Include file="instances.xml"/>
    <Include file="generated_network.net.nml"/>

    <Simulation id="sim" length="1000ms" step="0.05ms" target="network">

        <Display id="display_voltages" title="Voltages" timeScale="1ms" xmin="-100.0" xmax="1100.0" ymin="-95" ymax="-38">
            <Line id="GrC: Vm" quantity="GrCPop[0]/v" scale="1mV" color="#66c2a5" timeScale="1ms"/>
        </Display>

        <Display id="display_spike_generators" title="Spike generators" timeScale="1ms" xmin="-100.0" xmax="1100.0" ymin="-10" ymax="80">
            <Line id="mossySpikersPopON 0" quantity="mossySpikerONPop[0]/tsince" scale="1ms" color="#000000" timeScale="1ms"/>
            <Line id="mossySpikersPopOFF 0" quantity="mossySpikerOFFPop[0]/tsince" scale="1ms" color="#FF0000" timeScale="1ms"/>
        </Display>

        <OutputFile id="Volts_file" fileName="v.dat">
            <OutputColumn id="v0" quantity="GrCPop[0]/v"/>
        </OutputFile>

    </Simulation>

</Lems>
