<neuroml xmlns="http://www.neuroml.org/schema/neuroml2"  xmlns:xs="http://www.w3.org/2001/XMLSchema" xmlns:xsi="http://www.w3.org/2001/XMLSchema-instance" xsi:schemaLocation="http://www.neuroml.org/schema/neuroml2 https://raw.github.com/NeuroML/NeuroML2/development/Schemas/NeuroML2/NeuroML_v2beta4.xsd" id="network">
    <network id="network">
        <population id="GrCPop" component="IaF_GrC" size="1"/>
        <population id="mossySpikerONPop" component="mossySpikerON" size="2"/>
        <population id="mossySpikerOFFPop" component="mossySpikerOFF" size="2"/>
    </network>
</neuroml>
